// COMSOL Multiphysics 5.2.0.220 model "opt_square.mph"
// Optimization
// Optimization\n\nOptimization\n\nOptimization\n\nOptimization\n\nMy normal absorption\n\n
// Outline of the model tree
// Components: comp1 "Component 1", comp2 "Component 2"

Parameters
  d = 0.012148
  D = 0.04
  d_nr_max = 3.3890625
  freq0 = 3000[Hz]
  freq1 = 200[Hz]
  int_H = 0.4*factor
  int_W = period*nop
  lambda = 343[m]/freq1
  loss = 0.1
  loss_a = 0.00
  nop = floor(16*factor)
  period = d*ninperiod
  PMLH = 0.1[m/s]*factor
  sigma = 0.3[m/s]*factor
  theta_i = 0*pi/180
  W = 2*factor
  ninperiod = 8
  k = 3/7
  b = 4/7
  c1 = -0.05079884354629712
  c2 = -0.010167345506206784
  c3 = 0.057813673127651226
  c4 = 0.029442016053933793
  factor = 0.5*freq0/freq1+0.5  // 1/3*freq0/freq1+2/3
  H = 0.6*factor

Functions
  an2: Analytic "Refractive index function" [comp1] | funcname = nr; expr = k*floor(x)+b+c1*sin(pi/7*(x-1))+c2*sin(2*pi/7*(x-1))+c3*sin(3*pi/7*(x-1))+c4*sin(4*pi/7*(x-1)); args = x

Variables
  var2 "With array" [comp1]
    p_with = 1/2*real(-intup1(acpr.p_t*conj(acpr.vy))+intleft1(acpr.p_t*conj(acpr.vx))-intright1(acpr.p_t*conj(acpr.vx)))
  var3 "Without array" [comp2]
    p_without = 1/2*real(-intup2(acpr2.p_t*conj(acpr2.vy))+intleft2(acpr2.p_t*conj(acpr2.vx))-intright2(acpr2.p_t*conj(acpr2.vx)))

Selections
  box1: Box "vertical boundaries" [comp1]
    entitydim = 1
    xmin = -int_W/2-0.005
    xmax = int_W/2+0.005
    ymin = 0.01
    ymax = D-0.01
  box2: Box "horizontal boundaries" [comp1]
    entitydim = 1
    xmin = -int_W/2-0.005
    xmax = int_W/2+0.005
    ymin = -0.01
    ymax = 0.01
    condition = inside
  uni1: Union "hard boundaries" [comp1] | entitydim = 1; input = {box1, box2}

Couplings
  intop1: Integration "Integration up" on boundaries 10 | opname = intup1
  intop2: Integration "Integration up 2" on boundaries 10 | opname = intup2
  intop3: Integration "Integration left" on boundaries 6, 8 | opname = intleft1
  intop4: Integration "Integration right" on boundaries 3082 | opname = intright1
  intop5: Integration "Integration left 2" on boundaries 6, 8 | opname = intleft2
  intop6: Integration "Integration right 2" on boundaries 11, 13 | opname = intright2

Coordinate systems
  pml1: PML "Perfectly Matched Layer 1" [geom1] on domains 1
  pml2: PML "Perfectly Matched Layer 2" [geom2] on domains 1

Geometry
  geom1 "Geometry 1" [comp1] (2D, length unit m)
    c1: Circle (disabled) | contributeto = csel3; pos = {0, 0}; r = R; angle = 180
    r2: Rectangle | contributeto = csel2; pos = {-0.5*int_W, 0}; size = {int_W, int_H}
    r4: Rectangle | pos = {-period*nop/2, 0}; size = {d, D}
    arr2: Array | input = r4; size = {period/ninperiod/d*nop, 1}; displ = {ninperiod*d, 0}
    r6: Rectangle | pos = {-period*nop/2+d, 0}; size = {d, D}
    arr3: Array | input = r6; size = {period/ninperiod/d*nop, 1}; displ = {ninperiod*d, 0}
    r7: Rectangle | pos = {-period*nop/2+2*d, 0}; size = {d, D}
    arr4: Array | input = r7; size = {period/ninperiod/d*nop, 1}; displ = {ninperiod*d, 0}
    r8: Rectangle | pos = {-period*nop/2+3*d, 0}; size = {d, D}
    arr5: Array | input = r8; size = {period/ninperiod/d*nop, 1}; displ = {ninperiod*d, 0}
    r9: Rectangle | pos = {-period*nop/2+4*d, 0}; size = {d, D}
    arr6: Array | input = r9; size = {period/ninperiod/d*nop, 1}; displ = {ninperiod*d, 0}
    r10: Rectangle | pos = {-period*nop/2+5*d, 0}; size = {d, D}
    arr7: Array | input = r10; size = {period/ninperiod/d*nop, 1}; displ = {ninperiod*d, 0}
    r11: Rectangle | pos = {-period*nop/2+6*d, 0}; size = {d, D}
    arr8: Array | input = r11; size = {period/ninperiod/d*nop, 1}; displ = {ninperiod*d, 0}
    r12: Rectangle | pos = {-period*nop/2+7*d, 0}; size = {d, D}
    arr9: Array | input = r12; size = {period/ninperiod/d*nop, 1}; displ = {ninperiod*d, 0}
    r5: Rectangle | pos = {0, -0.5*PMLH}; base = center; size = {W, PMLH}
    r13: Rectangle | pos = {-W/2, 0}; size = {W, H}
    fin: Finalize "Form Union"
  geom2 "Geometry 2" [comp2] (2D, length unit m)
    c1: Circle (disabled) | r = R; angle = 180
    r2: Rectangle | pos = {-int_W/2, 0}; size = {int_W, int_H}
    r3: Rectangle | pos = {0, -0.5*PMLH}; base = center; size = {W, PMLH}
    r4: Rectangle | pos = {-period*nop/2, 0}; size = {int_W, D}
    r5: Rectangle | pos = {-W/2, 0}; size = {W, H}
    fin: Finalize "Form Union"

Materials
  mat1: Common "Material 1" [comp1] on domains 2, 4
    def "Basic"
      density = 1.25*(1-loss_a*i)
      soundspeed = 343/(1-loss_a*i)
  mat2: Common "Material 2" [comp1] (disabled) on domains 3, 5-1027
    def "Basic"
      density = 1.25*nr(x)*(1-loss*i)
      soundspeed = 343/nr(x)/sqrt(1-loss*i)
  mat4: Common "Air" [comp2] on domains 2-4
    def "Basic"
      density = 1.25
      soundspeed = 343
  mat5: Common "Perfectly Matched" [comp2] on domains 1
    def "Basic"
      density = 1.25*(1+loss_a*i)
      soundspeed = 343/(1+loss_a*i)
  mat6: Common "Material 6" [comp1] on domains 1
    def "Basic"
      density = 1.25
      soundspeed = 343
  mat7: Common [comp1] on selection geom1_arr2_dom
    def "Basic"
      density = 1.25*nr(1)*(1-loss*i)
      soundspeed = 343/nr(1)/sqrt(1-loss*i)
  mat8: Common [comp1] on selection geom1_arr3_dom
    def "Basic"
      density = 1.25*nr(2)*(1-loss*i)
      soundspeed = 343/nr(2)/sqrt(1-loss*i)
  mat9: Common [comp1] on selection geom1_arr4_dom
    def "Basic"
      density = 1.25*nr(3)*(1-loss*i)
      soundspeed = 343/nr(3)/sqrt(1-loss*i)
  mat10: Common [comp1] on selection geom1_arr5_dom
    def "Basic"
      density = 1.25*nr(4)*(1-loss*i)
      soundspeed = 343/nr(4)/sqrt(1-loss*i)
  mat11: Common [comp1] on selection geom1_arr6_dom
    def "Basic"
      density = 1.25*nr(5)*(1-loss*i)
      soundspeed = 343/nr(5)/sqrt(1-loss*i)
  mat12: Common [comp1] on selection geom1_arr7_dom
    def "Basic"
      density = 1.25*nr(6)*(1-loss*i)
      soundspeed = 343/nr(6)/sqrt(1-loss*i)
  mat13: Common [comp1] on selection geom1_arr8_dom
    def "Basic"
      density = 1.25*nr(7)*(1-loss*i)
      soundspeed = 343/nr(7)/sqrt(1-loss*i)
  mat14: Common [comp1] on selection geom1_arr9_dom
    def "Basic"
      density = 1.25*nr(8)*(1-loss*i)
      soundspeed = 343/nr(8)/sqrt(1-loss*i)

Physics
  acpr: PressureAcoustics "Pressure Acoustics, Frequency Domain" [geom1] on all domains
    dependent variable p
    fpam1: FrequencyPressureAcousticsModel "Pressure Acoustics 1" (default)
    shb1: SoundHard "Sound Hard Boundary (Wall) 1" (default)
    init1: init "Initial Values 1" (default)
    pwr1: PlaneWaveRadiation on boundaries 5
      ipf1: IncidentPressureField on boundaries 5
        IncidentPressureFieldType = UserDefined
        dir = {sin(theta_i), -cos(theta_i), 0}
        p_i = exp(-(x^2/sigma^2))*exp(-1i*acpr.k*(H-y))
        pamp = exp(-((x+R*sin(theta_i))^2+(y-R*cos(theta_i))^2)/(sigma^2))*exp(-1i*acpr2.k*(sin(theta_i)*x-cos(theta_i)*y))
    ishb1: InteriorSoundHard "Interior Sound Hard Boundary (Wall) 1" on selection uni1
  acpr2: PressureAcoustics "Pressure Acoustics, Frequency Domain 2" [geom2] on all domains
    dependent variable p2
    fpam1: FrequencyPressureAcousticsModel "Pressure Acoustics 1" (default)
    shb1: SoundHard "Sound Hard Boundary (Wall) 1" (default)
    init1: init "Initial Values 1" (default)
    pwr1: PlaneWaveRadiation on boundaries 5
      ipf1: IncidentPressureField on boundaries 5
        IncidentPressureFieldType = UserDefined
        dir = {sin(theta_i), -cos(theta_i), 0}
        p_i = exp(-(x^2/sigma^2))*exp(-1i*acpr2.k*(H-y))
        pamp = exp(-((x+R*sin(theta_i))^2+(y-R*cos(theta_i))^2)/(0.5^2))*exp(-1i*acpr.k*(sin(theta_i)*x-cos(theta_i)*y))

Mesh
  mesh3 "Mesh 3" [geom1] (physics-controlled)
    size: MeshSizeDefault | hauto = 2
  mesh4 "Mesh 4" [geom2] (physics-controlled)
    size: MeshSizeDefault | hauto = 1

Studies
  std1 "Study 1"
    opt: Optimization
      optsolver = montecarlo
      optobj = if(abs(freq-freq1)<5,comp1.p_with/comp2.p_without,0)
      optobjEvaluateFor = freq
      objectivetype = maximization
      initval = {0, 0, 0, 0}
      scale = {1, 1, 1, 1}
      lbound = {-0.5, -0.5, -0.5, -0.5}
      ubound = {0.5, 0.5, 0.5, 0.5}
      pname = {c1, c2, c3, c4}
    freq: Frequency "Frequency Domain"
      punit = Hz
      plist = {200,260,320,380,440,600,900,1200,1500,1800,2100,2400,2700,3000}
      preusesol = yes
      useparam = on
  std2 "Study 2"
    param: Parametric "Parametric Sweep" | pname = freq1; plistarr = 500
    freq: Frequency "Frequency Domain" | punit = Hz; plist = freq1

Solver configurations
  sol1 "Solution 1" (study std1)
    v1: Variables "Dependent Variables 1"
    s1: Stationary "Stationary Solver 1"
      dDef: Direct
      p1: Parametric
        sweeptype = filled
        pname = {freq, freq1}
        plistarr = {{200,260,320,380,440,600,900,1200,1500,1800,2100,2400,2700,3000}, {200,260,320,380,440,600,900,1200,1500,1800,2100,2400,2700,3000}}
        punit = {Hz, }
        pcontinuationmode = no
      fc1: FullyCoupled
      prob1: SolverProblem "Information 1"
        warning1: SolverWarning "Warnings 1"
  sol2 "Solution 2" (study std2)
    v1: Variables "Dependent Variables 1"
    s1: Stationary "Stationary Solver 1"
      dDef: Direct
      p1: Parametric | pname = freq; plistarr = freq1; punit = Hz; pcontinuationmode = no
      fc1: FullyCoupled