// COMSOL Multiphysics 5.2.0.220 model "optimization.mph"
// Optimization
// Optimization\n\nOptimization\n\nOptimization\n\nOptimization\n\nMy normal absorption\n\n
// Outline of the model tree
// Components: comp1 "Component 1", comp2 "Component 2"

Parameters
  d = 0.012148
  D = 0.04
  d_nr_max = 3.3890625
  freq0 = 3000[Hz]
  freq1 = 3000[Hz]
  int_H = 0.5*freq0/freq1
  int_W = period*nop
  lambda = 343[m]/freq1
  loss = 0.1
  loss_a = 0.00
  nop = floor(20*freq0/freq1)
  period = d*ninperiod
  PMLH = 0.1[m/s]*freq0/freq1
  R = 1.2148*freq0/freq1
  sigma = 0.3[m/s]*freq0/freq1
  theta_i = 0*pi/180
  W = 2*R
  ninperiod = 8
  c1 = 1.1945868393846726
  c2 = -1.428582762334767

Functions
  an2: Analytic "Refractive index function" [comp1] | funcname = nr; expr = k*floor(x)+b+c1*sin(pi/7*(x-1))+c2*sin(2*pi/7*(x-1)); args = x

Variables
  var2 "With array" [comp1]
    p_with = 1/2*real(-intup1(acpr.p_t*conj(acpr.vy))+intleft1(acpr.p_t*conj(acpr.vx))-intright1(acpr.p_t*conj(acpr.vx)))
  var3 "Without array" [comp2]
    p_without = 1/2*real(-intup2(acpr2.p_t*conj(acpr2.vy))+intleft2(acpr2.p_t*conj(acpr2.vx))-intright2(acpr2.p_t*conj(acpr2.vx)))

Selections
  box1: Box "vertical boundaries" [comp1]
    entitydim = 1
    xmin = -int_W/2-0.005
    xmax = int_W/2+0.005
    ymin = 0.01
    ymax = D-0.01
  box2: Box "horizontal boundaries" [comp1]
    entitydim = 1
    xmin = -int_W/2-0.005
    xmax = int_W/2+0.005
    ymin = -0.01
    ymax = 0.01
    condition = inside
  uni1: Union "hard boundaries" [comp1] | entitydim = 1; input = {box1, box2}

Couplings
  intop1: Integration "Integration up" on boundaries 8 | opname = intup1
  intop2: Integration "Integration up 2" on boundaries 8 | opname = intup2
  intop3: Integration "Integration left" on boundaries 4, 6 | opname = intleft1
  intop4: Integration "Integration right" on boundaries 487, 489 | opname = intright1
  intop5: Integration "Integration left 2" on boundaries 4, 6 | opname = intleft2
  intop6: Integration "Integration right 2" on boundaries 10, 12 | opname = intright2

Coordinate systems
  pml1: PML "Perfectly Matched Layer 1" [geom1] on domains 1
  pml2: PML "Perfectly Matched Layer 2" [geom2] on domains 1

Geometry
  geom1 "Geometry 1" [comp1] (2D, length unit m)
    c1: Circle | contributeto = csel3; pos = {0, 0}; r = R; angle = 180
    r2: Rectangle | contributeto = csel2; pos = {-0.5*int_W, 0}; size = {int_W, int_H}
    r4: Rectangle | pos = {-period*nop/2, 0}; size = {d, D}
    arr2: Array | input = r4; size = {period/ninperiod/d*nop, 1}; displ = {ninperiod*d, 0}
    r6: Rectangle | pos = {-period*nop/2+d, 0}; size = {d, D}
    arr3: Array | input = r6; size = {period/ninperiod/d*nop, 1}; displ = {ninperiod*d, 0}
    r7: Rectangle | pos = {-period*nop/2+2*d, 0}; size = {d, D}
    arr4: Array | input = r7; size = {period/ninperiod/d*nop, 1}; displ = {ninperiod*d, 0}
    r8: Rectangle | pos = {-period*nop/2+3*d, 0}; size = {d, D}
    arr5: Array | input = r8; size = {period/ninperiod/d*nop, 1}; displ = {ninperiod*d, 0}
    r9: Rectangle | pos = {-period*nop/2+4*d, 0}; size = {d, D}
    arr6: Array | input = r9; size = {period/ninperiod/d*nop, 1}; displ = {ninperiod*d, 0}
    r10: Rectangle | pos = {-period*nop/2+5*d, 0}; size = {d, D}
    arr7: Array | input = r10; size = {period/ninperiod/d*nop, 1}; displ = {ninperiod*d, 0}
    r11: Rectangle | pos = {-period*nop/2+6*d, 0}; size = {d, D}
    arr8: Array | input = r11; size = {period/ninperiod/d*nop, 1}; displ = {ninperiod*d, 0}
    r12: Rectangle | pos = {-period*nop/2+7*d, 0}; size = {d, D}
    arr9: Array | input = r12; size = {period/ninperiod/d*nop, 1}; displ = {ninperiod*d, 0}
    r5: Rectangle | pos = {0, -0.5*PMLH}; base = center; size = {W, PMLH}
    fin: Finalize "Form Union"
  geom2 "Geometry 2" [comp2] (2D, length unit m)
    c1: Circle | r = R; angle = 180
    r2: Rectangle | pos = {-int_W/2, 0}; size = {int_W, int_H}
    r3: Rectangle | pos = {0, -0.5*PMLH}; base = center; size = {W, PMLH}
    r4: Rectangle | pos = {-period*nop/2, 0}; size = {period*nop, D}
    fin: Finalize "Form Union"

Materials
  mat1: Common "Material 1" [comp1] on domains 2, 4
    def "Basic"
      density = 1.25*(1-loss_a*i)
      soundspeed = 343/(1-loss_a*i)
  mat2: Common "Material 2" [comp1] (disabled) on domains 3, 5-164
    def "Basic"
      density = 1.25*nr(x)*(1-loss*i)
      soundspeed = 343/nr(x)/sqrt(1-loss*i)
  mat4: Common "Air" [comp2] on domains 2-4
    def "Basic"
      density = 1.25*(1-loss_a*i)
      soundspeed = 343/(1-loss_a*i)
  mat5: Common "Perfectly Matched" [comp2] on domains 1
    def "Basic"
      density = 1.25
      soundspeed = 343
  mat6: Common "Material 6" [comp1] on domains 1
    def "Basic"
      density = 1.25
      soundspeed = 343
  mat7: Common [comp1] on selection geom1_arr2_dom
    def "Basic"
      density = 1.25*nr(1)*(1-loss*i)
      soundspeed = 343/nr(1)/sqrt(1-loss*i)
  mat8: Common [comp1] on selection geom1_arr3_dom
    def "Basic"
      density = 1.25*nr(2)*(1-loss*i)
      soundspeed = 343/nr(2)/sqrt(1-loss*i)
  mat9: Common [comp1] on selection geom1_arr4_dom
    def "Basic"
      density = 1.25*nr(3)*(1-loss*i)
      soundspeed = 343/nr(3)/sqrt(1-loss*i)
  mat10: Common [comp1] on selection geom1_arr5_dom
    def "Basic"
      density = 1.25*nr(4)*(1-loss*i)
      soundspeed = 343/nr(4)/sqrt(1-loss*i)
  mat11: Common [comp1] on selection geom1_arr6_dom
    def "Basic"
      density = 1.25*nr(5)*(1-loss*i)
      soundspeed = 343/nr(5)/sqrt(1-loss*i)
  mat12: Common [comp1] on selection geom1_arr7_dom
    def "Basic"
      density = 1.25*nr(6)*(1-loss*i)
      soundspeed = 343/nr(6)/sqrt(1-loss*i)
  mat13: Common [comp1] on selection geom1_arr8_dom
    def "Basic"
      density = 1.25*nr(7)*(1-loss*i)
      soundspeed = 343/nr(7)/sqrt(1-loss*i)
  mat14: Common [comp1] on selection geom1_arr9_dom
    def "Basic"
      density = 1.25*nr(8)*(1-loss*i)
      soundspeed = 343/nr(8)/sqrt(1-loss*i)

Physics
  acpr: PressureAcoustics "Pressure Acoustics, Frequency Domain" [geom1] on all domains
    dependent variable p
    fpam1: FrequencyPressureAcousticsModel "Pressure Acoustics 1" (default)
    shb1: SoundHard "Sound Hard Boundary (Wall) 1" (default)
    init1: init "Initial Values 1" (default)
    pwr1: PlaneWaveRadiation on boundaries 494, 495
      ipf1: IncidentPressureField on boundaries 7, 32, 33, 54, 56, 57, 78, 80, 81, 102, 104, 105, 126, 128, 129, 150, 152, 153, 174, 176, 177, 198, 200, 201, 222, 224, 225, 247, 249, 250, 271, 273, 274, 295, 297, 298, 310, 312, 313, 315, 316, 319, 321, 322, 325, 327, 328, 330, 331, 333, 334, 336, 337, 339, 340, 343, 345, 346, 349, 351, 352, 354, 355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
        IncidentPressureFieldType = UserDefined
        dir = {sin(theta_i), -cos(theta_i), 0}
        p_i = exp(-((x+R*sin(theta_i))^2+(y-R*cos(theta_i))^2)/(sigma^2))*exp(-1i*acpr.k*(sin(theta_i)*x-cos(theta_i)*y))
        pamp = exp(-((y-0.4+D/2-(25*0.025685-0.4*tan(theta_i))/tan(theta_i))/0.5)^2)
    ishb1: InteriorSoundHard "Interior Sound Hard Boundary (Wall) 1" on selection uni1
  acpr2: PressureAcoustics "Pressure Acoustics, Frequency Domain 2" [geom2] on all domains
    dependent variable p2
    fpam1: FrequencyPressureAcousticsModel "Pressure Acoustics 1" (default)
    shb1: SoundHard "Sound Hard Boundary (Wall) 1" (default)
    init1: init "Initial Values 1" (default)
    pwr1: PlaneWaveRadiation on boundaries 14, 15
      ipf1: IncidentPressureField on boundaries 14, 15
        IncidentPressureFieldType = UserDefined
        dir = {sin(theta_i), -cos(theta_i), 0}
        p_i = exp(-((x+R*sin(theta_i))^2+(y-R*cos(theta_i))^2)/(sigma^2))*exp(-1i*acpr2.k*(sin(theta_i)*x-cos(theta_i)*y))
        pamp = exp(-((x+R*sin(theta_i))^2+(y-R*cos(theta_i))^2)/(0.5^2))*exp(-1i*acpr.k*(sin(theta_i)*x-cos(theta_i)*y))

Mesh
  mesh3 "Mesh 3" [geom1]
    size: MeshSizeDefault | hauto = 2
    ftri1: FreeTri "Free Triangular 1" on domains 3, 5-164
      size1: Size on domains 3, 5-164
        hmax = lambda/100
        hmin = 2E-4
        hcurve = 0.25
        hnarrow = 2
        hgrad = 1.25
        hauto = 5
        custom = on
    ftri2: FreeTri "Free Triangular 2" on domains 2, 4
      size1: Size on domains 2, 4 | hmax = lambda/10; hauto = 5; custom = on
    ftri3: FreeTri "Free Triangular 3" on domains 1
      size1: Size on domains 1 | hmax = 0.117/10; hauto = 5; custom = on
  mesh4 "Mesh 4" [geom2]
    size: MeshSizeDefault | hauto = 2
    ftri2: FreeTri "Free Triangular 2" on domains 3
      size1: Size on domains 3
        hmax = lambda/100
        hmin = 2E-4
        hcurve = 0.25
        hnarrow = 2
        hgrad = 1.25
        hauto = 5
        custom = on
    ftri3: FreeTri "Free Triangular 3" on domains 1, 2, 4
      size1: Size on domains 1, 2, 4 | hmax = lambda/10; hmin = 7E-4; hcurve = 0.2; hgrad = 1.1; hauto = 5; custom = on

Studies
  std1 "Study 1"
    param: Parametric "Parametric Sweep" | pname = freq1; plistarr = {400,3000}
    freq: Frequency "Frequency Domain" | punit = Hz; plist = freq1
  std2 "opt"
    opt: Optimization | optobj = comp1.p_with/comp2.p_without/13; optobjEvaluateFor = freq; objectivetype = maximization
    freq: Frequency "Frequency Domain" | punit = Hz; plist = range(600,200,3000)

Solver configurations
  sol1 "Solution 1" (study std1)
    v1: Variables "Dependent Variables 1"
    s1: Stationary "Stationary Solver 1"
      dDef: Direct
      p1: Parametric | pname = freq; plistarr = freq1; punit = Hz; pcontinuationmode = no
      fc1: FullyCoupled
  sol2 "Solution 2" (study std2)
    v1: Variables "Dependent Variables 1"
    s1: Stationary "Stationary Solver 1"
      dDef: Direct
      p1: Parametric | pname = freq; plistarr = range(600,200,3000); punit = Hz; pcontinuationmode = no
      fc1: FullyCoupled